// COMSOL Multiphysics 5.4.0.295 model "ART_res.mph"
// Outline of the model tree

Parameters
  t_sub = 500[um]
  W_cond = 2[um]
  gap = 1[um]
  height = .05[um]
  w_mesa = 0.4[um]
  h_mesa = .05[um]
  l_ind = 25[um]
  gamma = 4.342e07[T*s]
  n_Bi = 1e25[m^-3]

Functions
  int1: Interpolation "Jlab" | importedname = current_10um.txt; funcs = {J, 1}; source = file; filename = /home/ucapmhy/Documents/current_density.csv; funcname = J; defvars = on; interp = cubicspline; argunit = m; fununit = A/m^2

Selections
  sel1: Explicit "MESA" on no domains

Geometry
  geom1 "Geometry 1" (2D, length unit µm)
    r3: Rectangle "air" | pos = {-2500, 0}; size = {5000, 500}
    r1: Rectangle "res1" | pos = {-0.5*(gap+W_cond), height/2}; base = center; size = {W_cond, height}
    r4: Rectangle "Sub" | pos = {-2500, -t_sub}; size = {5000, t_sub}
    r5: Rectangle "res2" | pos = {0.5*(gap+W_cond), height/2}; base = center; size = {W_cond, height}
    r6: Rectangle "MESA" | pos = {-w_mesa/2, 0}; size = {w_mesa, h_mesa}
    fin: Finalize "Form Union"

Materials
  mat1: Common "Silicon [solid,bulk]"
    def "Basic"
      thermalconductivity = k_solid_bulk_1(T[1/K])[W/(m*K)]
      thermalexpansioncoefficient = (alpha_solid_1(T[1/K])[1/K]+(Tempref-293[K])*if(abs(T-Tempref)>1e-3,(alpha_solid_1(T[1/K])[1/K]-alpha_solid_1(Tempref[1/K])[1/K])/(T-Tempref),d(alpha_solid_1(T[1/K])[1/K],T)))/(1+alpha_solid_1(Tempref[1/K])[1/K]*(Tempref-293[K]))
      heatcapacity = C_solid_1(T[1/K])[J/(kg*K)]
      HC = HC_solid_1(T[1/K])[J/(mol*K)]
      VP = VP_solid_1(T[1/K])[Pa]
      density = rho_solid_1(T[1/K])[kg/m^3]
      TD = TD(T[1/K])[m^2/s]
      k_solid_bulk_1: Piecewise
        arg = T
        pieces = 
          {0.0, 8.0, 1.0E-15-0.2498417*T^1+1.481083*T^2+5.733086*T^3-0.3609236*T^4}
          {8.0, 35.0, 2955.562-1163.24*T^1+195.2953*T^2-10.93608*T^3+0.2648092*T^4-0.002396056*T^5}
          {35.0, 100.0, 14141.66-506.8115*T^1+8.440371*T^2-0.06860715*T^3+2.162919E-4*T^4}
          {100.0, 273.0, 5061.885-79.31105*T^1+0.5061928*T^2-0.001469493*T^3+1.607847E-6*T^4}
          {273.0, 1000.0, 810.9131-4.713958*T^1+0.01248387*T^2-1.698128E-5*T^3+1.152568E-8*T^4-3.094028E-12*T^5}
          {1000.0, 1685.0, 393.8803-0.980598*T^1+9.947652E-4*T^2-4.55816E-7*T^3+7.898531E-11*T^4}
      alpha_solid_1: Piecewise "Piecewise 1a"
        arg = T
        pieces = 
          {0.0, 30.0, 7.35637E-7+2.453566E-9*T^1+1.20482E-11*T^2}
          {30.0, 130.0, 7.713685E-7+2.098318E-10*T^1+4.628581E-11*T^2+7.569451E-14*T^3-8.713366E-16*T^4}
          {130.0, 293.0, -3.223163E-7+2.257142E-8*T^1-9.684044E-11*T^2+2.835316E-13*T^3-3.440569E-16*T^4}
          {293.0, 1000.0, 6.772622E-7+9.501405E-9*T^1-1.271286E-11*T^2+8.584038E-15*T^3-2.241706E-18*T^4}
      C_solid_1: Piecewise "Piecewise 1b"
        arg = T
        pieces = 
          {1.0, 7.0, -4.832181E-5+7.684481E-5*T^1-3.418134E-5*T^2+2.808307E-4*T^3-3.128973E-7*T^4}
          {7.0, 20.0, 0.05250753-0.03964815*T^1+0.01004609*T^2-7.812515E-4*T^3+3.961557E-5*T^4}
          {20.0, 50.0, -1.805675+0.7619035*T^1-0.08653738*T^2+0.003735361*T^3-3.333976E-5*T^4}
          {50.0, 293.0, -82.94826+2.712235*T^1+0.01404751*T^2-7.977691E-5*T^3+1.079905E-7*T^4}
          {293.0, 900.0, 63.04422+3.770673*T^1-0.006948536*T^2+5.953204E-6*T^3-1.914384E-9*T^4}
          {900.0, 1685.0, 769.4598+0.1871751*T^1-3.18396E-5*T^2}
      HC_solid_1: Piecewise "Piecewise 1c"
        arg = T
        pieces = 
          {1.0, 7.0, -1.357143E-6+2.158225E-6*T^1-9.6E-7*T^2+7.887271E-6*T^3-8.787877E-9*T^4}
          {7.0, 20.0, 0.0014747-0.001113538*T^1+2.821496E-4*T^2-2.194184E-5*T^3+1.112623E-6*T^4}
          {20.0, 50.0, -0.0507133+0.02139844*T^1-0.002430445*T^2+1.049095E-4*T^3-9.363637E-7*T^4}
          {50.0, 293.0, -2.329644+0.07617449*T^1+3.945314E-4*T^2-2.240575E-6*T^3+3.032968E-9*T^4}
          {293.0, 900.0, 1.392342+0.1090406*T^1-2.043951E-4*T^2+1.786899E-7*T^3-5.888574E-11*T^4}
          {900.0, 1685.0, 22.03321+0.004585166*T^1-6.452268E-7*T^2}
      VP_solid_1: Piecewise "Piecewise 1d" | arg = T; pieces = {293.0, 1685.0, (exp((-2.355000e+04/T-5.650000e-01*log10(T)+1.235000e+01)*log(10.0)))*1.333200e+02}
      rho_solid_1: Piecewise "Piecewise 1e"
        arg = T
        pieces = 
          {0.0, 30.0, 2331.507-7.113612E-5*T^1+3.674386E-6*T^2}
          {30.0, 130.0, 2331.592-0.005873649*T^1+1.206114E-4*T^2-5.479876E-7*T^3+1.606517E-10*T^4}
          {130.0, 293.0, 2330.436+0.02130626*T^1-9.544145E-5*T^2+4.607415E-8*T^3+4.840886E-11*T^4}
          {293.0, 1000.0, 2332.565+0.003839515*T^1-5.433308E-5*T^2+4.287211E-8*T^3-1.366545E-11*T^4}
      TD: Piecewise
        arg = T
        pieces = 
          {1.0, 12.0, 12.40366-2.652049*T^1+0.5813105*T^2-0.08018325*T^3+0.005288731*T^4-1.314169E-4*T^5}
          {12.0, 36.0, 12.40379-1.240777*T^1+0.03837706*T^2-9.696578E-6*T^3-1.861403E-5*T^4+2.36465E-7*T^5}
          {36.0, 70.0, 2.231412-0.1770592*T^1+0.005725565*T^2-9.331438E-5*T^3+7.623105E-7*T^4-2.489437E-9*T^5}
          {70.0, 165.0, 0.08907341-0.003083678*T^1+4.419818E-5*T^2-3.22047E-7*T^3+1.182074E-9*T^4-1.739399E-12*T^5}
          {165.0, 305.0, 0.01190219-2.287791E-4*T^1+1.824052E-6*T^2-7.358192E-9*T^3+1.487663E-11*T^4-1.200563E-14*T^5}
          {305.0, 735.0, 7.622018E-4-5.322058E-6*T^1+1.632442E-8*T^2-2.584688E-11*T^3+2.077321E-14*T^4-6.740584E-18*T^5}
          {735.0, 1000.0, -2.043535E-4+1.357482E-6*T^1-2.753022E-9*T^2+2.336409E-12*T^3-7.219021E-16*T^4}
    ThermalExpansion
      alphatan = CTE(T[1/K])[1/K]
      dL = (dL_solid_1(T[1/K])-dL_solid_1(Tempref[1/K]))/(1+dL_solid_1(Tempref[1/K]))
      alphatanIso = CTE(T)
      dLIso = (dL_solid_1(T)-dL_solid_1(Tempref))/(1+dL_solid_1(Tempref))
      dL_solid_1: Piecewise
        arg = T
        pieces = 
          {0.0, 30.0, -2.154537E-4}
          {30.0, 130.0, -2.276144E-4+8.396104E-7*T^1-1.724143E-8*T^2+7.834799E-11*T^3-2.303956E-14*T^4}
          {130.0, 293.0, -5.217231E-5-3.263667E-6*T^1+1.532991E-8*T^2-1.223001E-11*T^3}
          {293.0, 1000.0, -5.844527E-4+1.124129E-6*T^1+3.311476E-9*T^2-1.161022E-12*T^3}
      CTE: Piecewise
        arg = T
        pieces = 
          {0.0, 35.0, -1.128708E-10+4.013852E-10*T^1-1.52474E-10*T^2+1.935922E-11*T^3-8.512984E-13*T^4+9.848876E-15*T^5}
          {35.0, 121.0, -4.536302E-7+5.088778E-8*T^1-1.847617E-9*T^2+2.348401E-11*T^3-1.242463E-13*T^4+2.442997E-16*T^5}
          {121.0, 293.0, 8.574679E-8-3.514147E-8*T^1+4.332654E-10*T^2-1.449023E-12*T^3+1.630929E-15*T^4}
          {293.0, 1000.0, -2.621356E-6+3.020773E-8*T^1-5.538848E-11*T^2+4.755059E-14*T^3-1.534596E-17*T^4}
  mat3: Common "Silicon [solid,bulk]" on domains 1, 4
    def "Basic"
      thermalconductivity = k_solid_bulk_1(T[1/K])[W/(m*K)]
      thermalexpansioncoefficient = (alpha_solid_1(T[1/K])[1/K]+(Tempref-293[K])*if(abs(T-Tempref)>1e-3,(alpha_solid_1(T[1/K])[1/K]-alpha_solid_1(Tempref[1/K])[1/K])/(T-Tempref),d(alpha_solid_1(T[1/K])[1/K],T)))/(1+alpha_solid_1(Tempref[1/K])[1/K]*(Tempref-293[K]))
      heatcapacity = C_solid_1(T[1/K])[J/(kg*K)]
      HC = HC_solid_1(T[1/K])[J/(mol*K)]
      VP = VP_solid_1(T[1/K])[Pa]
      density = rho_solid_1(T[1/K])[kg/m^3]
      TD = TD(T[1/K])[m^2/s]
      relpermittivity = 11
      relpermeability = 1
      electricconductivity = 0
      k_solid_bulk_1: Piecewise
        arg = T
        pieces = 
          {0.0, 8.0, 1.0E-15-0.2498417*T^1+1.481083*T^2+5.733086*T^3-0.3609236*T^4}
          {8.0, 35.0, 2955.562-1163.24*T^1+195.2953*T^2-10.93608*T^3+0.2648092*T^4-0.002396056*T^5}
          {35.0, 100.0, 14141.66-506.8115*T^1+8.440371*T^2-0.06860715*T^3+2.162919E-4*T^4}
          {100.0, 273.0, 5061.885-79.31105*T^1+0.5061928*T^2-0.001469493*T^3+1.607847E-6*T^4}
          {273.0, 1000.0, 810.9131-4.713958*T^1+0.01248387*T^2-1.698128E-5*T^3+1.152568E-8*T^4-3.094028E-12*T^5}
          {1000.0, 1685.0, 393.8803-0.980598*T^1+9.947652E-4*T^2-4.55816E-7*T^3+7.898531E-11*T^4}
      alpha_solid_1: Piecewise "Piecewise 1a"
        arg = T
        pieces = 
          {0.0, 30.0, 7.35637E-7+2.453566E-9*T^1+1.20482E-11*T^2}
          {30.0, 130.0, 7.713685E-7+2.098318E-10*T^1+4.628581E-11*T^2+7.569451E-14*T^3-8.713366E-16*T^4}
          {130.0, 293.0, -3.223163E-7+2.257142E-8*T^1-9.684044E-11*T^2+2.835316E-13*T^3-3.440569E-16*T^4}
          {293.0, 1000.0, 6.772622E-7+9.501405E-9*T^1-1.271286E-11*T^2+8.584038E-15*T^3-2.241706E-18*T^4}
      C_solid_1: Piecewise "Piecewise 1b"
        arg = T
        pieces = 
          {1.0, 7.0, -4.832181E-5+7.684481E-5*T^1-3.418134E-5*T^2+2.808307E-4*T^3-3.128973E-7*T^4}
          {7.0, 20.0, 0.05250753-0.03964815*T^1+0.01004609*T^2-7.812515E-4*T^3+3.961557E-5*T^4}
          {20.0, 50.0, -1.805675+0.7619035*T^1-0.08653738*T^2+0.003735361*T^3-3.333976E-5*T^4}
          {50.0, 293.0, -82.94826+2.712235*T^1+0.01404751*T^2-7.977691E-5*T^3+1.079905E-7*T^4}
          {293.0, 900.0, 63.04422+3.770673*T^1-0.006948536*T^2+5.953204E-6*T^3-1.914384E-9*T^4}
          {900.0, 1685.0, 769.4598+0.1871751*T^1-3.18396E-5*T^2}
      HC_solid_1: Piecewise "Piecewise 1c"
        arg = T
        pieces = 
          {1.0, 7.0, -1.357143E-6+2.158225E-6*T^1-9.6E-7*T^2+7.887271E-6*T^3-8.787877E-9*T^4}
          {7.0, 20.0, 0.0014747-0.001113538*T^1+2.821496E-4*T^2-2.194184E-5*T^3+1.112623E-6*T^4}
          {20.0, 50.0, -0.0507133+0.02139844*T^1-0.002430445*T^2+1.049095E-4*T^3-9.363637E-7*T^4}
          {50.0, 293.0, -2.329644+0.07617449*T^1+3.945314E-4*T^2-2.240575E-6*T^3+3.032968E-9*T^4}
          {293.0, 900.0, 1.392342+0.1090406*T^1-2.043951E-4*T^2+1.786899E-7*T^3-5.888574E-11*T^4}
          {900.0, 1685.0, 22.03321+0.004585166*T^1-6.452268E-7*T^2}
      VP_solid_1: Piecewise "Piecewise 1d" | arg = T; pieces = {293.0, 1685.0, (exp((-2.355000e+04/T-5.650000e-01*log10(T)+1.235000e+01)*log(10.0)))*1.333200e+02}
      rho_solid_1: Piecewise "Piecewise 1e"
        arg = T
        pieces = 
          {0.0, 30.0, 2331.507-7.113612E-5*T^1+3.674386E-6*T^2}
          {30.0, 130.0, 2331.592-0.005873649*T^1+1.206114E-4*T^2-5.479876E-7*T^3+1.606517E-10*T^4}
          {130.0, 293.0, 2330.436+0.02130626*T^1-9.544145E-5*T^2+4.607415E-8*T^3+4.840886E-11*T^4}
          {293.0, 1000.0, 2332.565+0.003839515*T^1-5.433308E-5*T^2+4.287211E-8*T^3-1.366545E-11*T^4}
      TD: Piecewise
        arg = T
        pieces = 
          {1.0, 12.0, 12.40366-2.652049*T^1+0.5813105*T^2-0.08018325*T^3+0.005288731*T^4-1.314169E-4*T^5}
          {12.0, 36.0, 12.40379-1.240777*T^1+0.03837706*T^2-9.696578E-6*T^3-1.861403E-5*T^4+2.36465E-7*T^5}
          {36.0, 70.0, 2.231412-0.1770592*T^1+0.005725565*T^2-9.331438E-5*T^3+7.623105E-7*T^4-2.489437E-9*T^5}
          {70.0, 165.0, 0.08907341-0.003083678*T^1+4.419818E-5*T^2-3.22047E-7*T^3+1.182074E-9*T^4-1.739399E-12*T^5}
          {165.0, 305.0, 0.01190219-2.287791E-4*T^1+1.824052E-6*T^2-7.358192E-9*T^3+1.487663E-11*T^4-1.200563E-14*T^5}
          {305.0, 735.0, 7.622018E-4-5.322058E-6*T^1+1.632442E-8*T^2-2.584688E-11*T^3+2.077321E-14*T^4-6.740584E-18*T^5}
          {735.0, 1000.0, -2.043535E-4+1.357482E-6*T^1-2.753022E-9*T^2+2.336409E-12*T^3-7.219021E-16*T^4}
    ThermalExpansion
      alphatan = CTE(T[1/K])[1/K]
      dL = (dL_solid_1(T[1/K])-dL_solid_1(Tempref[1/K]))/(1+dL_solid_1(Tempref[1/K]))
      alphatanIso = CTE(T)
      dLIso = (dL_solid_1(T)-dL_solid_1(Tempref))/(1+dL_solid_1(Tempref))
      dL_solid_1: Piecewise
        arg = T
        pieces = 
          {0.0, 30.0, -2.154537E-4}
          {30.0, 130.0, -2.276144E-4+8.396104E-7*T^1-1.724143E-8*T^2+7.834799E-11*T^3-2.303956E-14*T^4}
          {130.0, 293.0, -5.217231E-5-3.263667E-6*T^1+1.532991E-8*T^2-1.223001E-11*T^3}
          {293.0, 1000.0, -5.844527E-4+1.124129E-6*T^1+3.311476E-9*T^2-1.161022E-12*T^3}
      CTE: Piecewise
        arg = T
        pieces = 
          {0.0, 35.0, -1.128708E-10+4.013852E-10*T^1-1.52474E-10*T^2+1.935922E-11*T^3-8.512984E-13*T^4+9.848876E-15*T^5}
          {35.0, 121.0, -4.536302E-7+5.088778E-8*T^1-1.847617E-9*T^2+2.348401E-11*T^3-1.242463E-13*T^4+2.442997E-16*T^5}
          {121.0, 293.0, 8.574679E-8-3.514147E-8*T^1+4.332654E-10*T^2-1.449023E-12*T^3+1.630929E-15*T^4}
          {293.0, 1000.0, -2.621356E-6+3.020773E-8*T^1-5.538848E-11*T^2+4.755059E-14*T^3-1.534596E-17*T^4}
  mat2: Common "Material 2" on domains 3, 5
    def "Basic"
      electricconductivity = 1
      relpermeability = .001
      relpermittivity = 1
  mat4: Common "Air" on domains 2
    def "Basic"
      relpermeability = 1
      relpermittivity = 1
      dynamicviscosity = eta(T[1/K])[Pa*s]
      ratioofspecificheat = 1.4
      electricconductivity = 0[S/m]
      heatcapacity = Cp(T[1/K])[J/(kg*K)]
      density = rho(pA[1/Pa],T[1/K])[kg/m^3]
      thermalconductivity = k(T[1/K])[W/(m*K)]
      soundspeed = cs(T[1/K])[m/s]
      eta: Piecewise | arg = T; pieces = {200.0, 1600.0, -8.38278E-7+8.35717342E-8*T^1-7.69429583E-11*T^2+4.6437266E-14*T^3-1.06585607E-17*T^4}
      Cp: Piecewise | arg = T; pieces = {200.0, 1600.0, 1047.63657-0.372589265*T^1+9.45304214E-4*T^2-6.02409443E-7*T^3+1.2858961E-10*T^4}
      rho: Analytic | expr = pA*0.02897/R_const[K*mol/J]/T; args = {pA, T}; dermethod = manual; argders = {{pA, d(pA*0.02897/R_const/T,pA)}, {T, d(pA*0.02897/R_const/T,T)}}
      k: Piecewise | arg = T; pieces = {200.0, 1600.0, -0.00227583562+1.15480022E-4*T^1-7.90252856E-8*T^2+4.11702505E-11*T^3-7.43864331E-15*T^4}
      cs: Analytic | expr = sqrt(1.4*287*T); args = T; dermethod = manual; argders = {T, d(sqrt(1.4*287*T),T)}
    RefractiveIndex
      n = 1
      ki = 0

Physics
  mf: InductionCurrents "Magnetic Fields" on all domains
    dependent variable A = {Ax, Ay, Az}
    al1: AmperesLaw "Ampère's Law 1" (default)
    mi1: MagneticInsulation (default)
    init1: init "Initial Values 1" (default)
    ecd1: ExternalCurrentDensity on domains 3 | Je = {0, 0, J(x)}
    ecd2: ExternalCurrentDensity on domains 5 | Je = {0, 0, -J(x)}

Mesh
  mesh1 "Mesh 1" (physics-controlled)
    size: MeshSizeDefault | hauto = 2

Studies
  std1 "Study 1"
    stat: Stationary

Solver configurations
  sol1 "Solution 1" (study std1)
    v1: Variables "Dependent Variables 1"
    s1: Stationary "Stationary Solver 1"
      dDef: Direct
      fc1: FullyCoupled | linsolver = dDef

Datasets
  dset1: Solution | solution = sol1

Derived values
  int1: IntSurface "g_ens^2" on domains 1, 4
    data = dset1
    table = tbl1
    expr = {(gamma*mf.normB)^2*(mf.normB<2.0e-9[T])*(mf.normB>1.9e-9[T])*l_ind*n_Bi, (gamma*mf.normB)^2*(mf.normB<1.9e-9[T])*(mf.normB>1.8e-9[T])*l_ind*n_Bi, (gamma*mf.normB)^2*(mf.normB<1.8e-9[T])*(mf.normB>1.7e-9[T])*l_ind*n_Bi, (gamma*mf.normB)^2*(mf.normB<1.7e-9[T])*(mf.normB>1.6e-9[T])*l_ind*n_Bi, (gamma*mf.normB)^2*(mf.normB<1.6e-9[T])*(mf.normB>1.5e-9[T])*l_ind*n_Bi, (gamma*mf.normB)^2*(mf.normB<1.5e-9[T])*(mf.normB>1.4e-9[T])*l_ind*n_Bi, (gamma*mf.normB)^2*(mf.normB<1.4e-9[T])*(mf.normB>1.3e-9[T])*l_ind*n_Bi, (gamma*mf.normB)^2*(mf.normB<1.3e-9[T])*(mf.normB>1.2e-9[T])*l_ind*n_Bi, (gamma*mf.normB)^2*(mf.normB<1.2e-9[T])*(mf.normB>1.1e-9[T])*l_ind*n_Bi, (gamma*mf.normB)^2*(mf.normB<1.1e-9[T])*(mf.normB>1.0e-9[T])*l_ind*n_Bi, (gamma*mf.normB)^2*(mf.normB<1.0e-9[T])*(mf.normB>0.9e-9[T])*l_ind*n_Bi, (gamma*mf.normB)^2*(mf.normB<0.9e-9[T])*(mf.normB>0.8e-9[T])*l_ind*n_Bi, (gamma*mf.normB)^2*(mf.normB<0.8e-9[T])*(mf.normB>0.7e-9[T])*l_ind*n_Bi, (gamma*mf.normB)^2*(mf.normB<0.7e-9[T])*(mf.normB>0.6e-9[T])*l_ind*n_Bi, (gamma*mf.normB)^2*(mf.normB<0.6e-9[T])*(mf.normB>0.5e-9[T])*l_ind*n_Bi, (gamma*mf.normB)^2*(mf.normB<0.5e-9[T])*(mf.normB>0.4e-9[T])*l_ind*n_Bi, (gamma*mf.normB)^2*(mf.normB<0.4e-9[T])*(mf.normB>0.3e-9[T])*l_ind*n_Bi, (gamma*mf.normB)^2*(mf.normB<0.3e-9[T])*(mf.normB>0.2e-9[T])*l_ind*n_Bi, (gamma*mf.normB)^2*(mf.normB<0.2e-9[T])*(mf.normB>0.15e-9[T])*l_ind*n_Bi, (gamma*mf.normB)^2*(mf.normB<0.15e-9[T])*(mf.normB>0.1e-9[T])*l_ind*n_Bi, (gamma*mf.normB)^2*(mf.normB<0.1e-9[T])*(mf.normB>0.09e-9[T])*l_ind*n_Bi, (gamma*mf.normB)^2*(mf.normB<0.09e-9[T])*(mf.normB>0.08e-9[T])*l_ind*n_Bi, (gamma*mf.normB)^2*(mf.normB<0.08e-9[T])*(mf.normB>0.07e-9[T])*l_ind*n_Bi, (gamma*mf.normB)^2*(mf.normB<0.07e-9[T])*(mf.normB>0.06e-9[T])*l_ind*n_Bi, (gamma*mf.normB)^2*(mf.normB<0.06e-9[T])*(mf.normB>0.05e-9[T])*l_ind*n_Bi, (gamma*mf.normB)^2*(mf.normB<0.05e-9[T])*(mf.normB>0.04e-9[T])*l_ind*n_Bi, (gamma*mf.normB)^2*(mf.normB<0.04e-9[T])*(mf.normB>0.03e-9[T])*l_ind*n_Bi, (gamma*mf.normB)^2*(mf.normB<0.03e-9[T])*(mf.normB>0.02e-9[T])*l_ind*n_Bi, (gamma*mf.normB)^2*(mf.normB<0.02e-9[T])*(mf.normB>0.01e-9[T])*l_ind*n_Bi, (gamma*mf.normB)^2*(mf.normB<0.01e-9[T])*(mf.normB>0.00e-9[T])*l_ind*n_Bi}
    unit = {kg^4/(s^6*A^4), kg^4/(s^6*A^4), kg^4/(s^6*A^4), kg^4/(s^6*A^4), kg^4/(s^6*A^4), kg^4/(s^6*A^4), kg^4/(s^6*A^4), kg^4/(s^6*A^4), kg^4/(s^6*A^4), kg^4/(s^6*A^4), kg^4/(s^6*A^4), kg^4/(s^6*A^4), kg^4/(s^6*A^4), kg^4/(s^6*A^4), kg^4/(s^6*A^4), kg^4/(s^6*A^4), kg^4/(s^6*A^4), kg^4/(s^6*A^4), kg^4/(s^6*A^4), kg^4/(s^6*A^4), kg^4/(s^6*A^4), kg^4/(s^6*A^4), kg^4/(s^6*A^4), kg^4/(s^6*A^4), kg^4/(s^6*A^4), kg^4/(s^6*A^4), kg^4/(s^6*A^4), kg^4/(s^6*A^4), kg^4/(s^6*A^4), kg^4/(s^6*A^4)}
    descr = {1.9-2.0, 1.8-1.9, 1.7-1.8, 1.6-1.7, 1.5-1.6, 1.4-1.5, 1.3-1.4, 1.2-1.3, 1.1-1.2, 1.0-1.1, 0.9-1.0, 0.8-0.9, 0.7-0.8, 0.6-0.7, 0.5-0.6, 0.4-0.5, 0.3-0.4, 0.2-0.3, 0.15-0.2, 0.1-0.15, 0.09-0.1, 0.08-0.09, 0.07-0.08, 0.06-0.07, 0.05-0.06, 0.04-0.05, 0.03-0.04, 0.02-0.03, 0.01-0.02, 0.00-0.01}
  int3: IntSurface "N" on domains 1, 4
    data = dset1
    table = tbl2
    expr = {(mf.normB<2.0e-9[T])*(mf.normB>1.9e-9[T])*l_ind*n_Bi, (mf.normB<1.9e-9[T])*(mf.normB>1.8e-9[T])*l_ind*n_Bi, (mf.normB<1.8e-9[T])*(mf.normB>1.7e-9[T])*l_ind*n_Bi, (mf.normB<1.7e-9[T])*(mf.normB>1.6e-9[T])*l_ind*n_Bi, (mf.normB<1.6e-9[T])*(mf.normB>1.5e-9[T])*l_ind*n_Bi, (mf.normB<1.5e-9[T])*(mf.normB>1.4e-9[T])*l_ind*n_Bi, (mf.normB<1.4e-9[T])*(mf.normB>1.3e-9[T])*l_ind*n_Bi, (mf.normB<1.3e-9[T])*(mf.normB>1.2e-9[T])*l_ind*n_Bi, (mf.normB<1.2e-9[T])*(mf.normB>1.1e-9[T])*l_ind*n_Bi, (mf.normB<1.1e-9[T])*(mf.normB>1.0e-9[T])*l_ind*n_Bi, (mf.normB<1.0e-9[T])*(mf.normB>0.9e-9[T])*l_ind*n_Bi, (mf.normB<0.9e-9[T])*(mf.normB>0.8e-9[T])*l_ind*n_Bi, (mf.normB<0.8e-9[T])*(mf.normB>0.7e-9[T])*l_ind*n_Bi, (mf.normB<0.7e-9[T])*(mf.normB>0.6e-9[T])*l_ind*n_Bi, (mf.normB<0.6e-9[T])*(mf.normB>0.5e-9[T])*l_ind*n_Bi, (mf.normB<0.5e-9[T])*(mf.normB>0.4e-9[T])*l_ind*n_Bi, (mf.normB<0.4e-9[T])*(mf.normB>0.3e-9[T])*l_ind*n_Bi, (mf.normB<0.3e-9[T])*(mf.normB>0.2e-9[T])*l_ind*n_Bi, (mf.normB<0.2e-9[T])*(mf.normB>0.15e-9[T])*l_ind*n_Bi, (mf.normB<0.15e-9[T])*(mf.normB>0.1e-9[T])*l_ind*n_Bi, (mf.normB<0.1e-9[T])*(mf.normB>0.09e-9[T])*l_ind*n_Bi, (mf.normB<0.09e-9[T])*(mf.normB>0.08e-9[T])*l_ind*n_Bi, (mf.normB<0.08e-9[T])*(mf.normB>0.07e-9[T])*l_ind*n_Bi, (mf.normB<0.07e-9[T])*(mf.normB>0.06e-9[T])*l_ind*n_Bi, (mf.normB<0.06e-9[T])*(mf.normB>0.05e-9[T])*l_ind*n_Bi, (mf.normB<0.05e-9[T])*(mf.normB>0.04e-9[T])*l_ind*n_Bi, (mf.normB<0.04e-9[T])*(mf.normB>0.03e-9[T])*l_ind*n_Bi, (mf.normB<0.03e-9[T])*(mf.normB>0.02e-9[T])*l_ind*n_Bi, (mf.normB<0.02e-9[T])*(mf.normB>0.01e-9[T])*l_ind*n_Bi, (mf.normB<0.01e-9[T])*(mf.normB>0.0e-9[T])*l_ind*n_Bi}
    unit = {1, 1, 1, 1, 1, 1, 1, 1, 1, 1, 1, 1, 1, 1, 1, 1, 1, 1, 1, 1, 1, 1, 1, 1, 1, 1, 1, 1, 1, 1}
    descr = {1.9-2.0, 1.8-1.9, 1.7-1.8, 1.6-1.7, 1.5-1.6, 1.4-1.5, 1.3-1.4, 1.2-1.3, 1.1-1.2, 1.0-1.1, 0.9-1.0, 0.8-0.9, 0.7-0.8, 0.6-0.7, 0.5-0.6, 0.4-0.5, 0.3-0.4, 0.2-0.3, 0.15-0.2, 0.1-0.15, 0.09-0.1, 0.08-0.09, 0.07-0.08, 0.06-0.07, 0.05-0.06, 0.04-0.05, 0.03-0.04, 0.02-0.03, 0.01-0.02, 0.00-0.01}
  int4: IntSurface "g_ens^2_number" on domains 1, 4 | data = dset1; table = tbl3; expr = (gamma*mf.normB)^2*l_ind*n_Bi

Tables
  tbl1: Table "g_ens2"
    // g_ens^2 ((gamma*mf.normB)^2*(mf.normB<2.0e-9[T])*(mf.normB>1.9e-9[T])*l_ind*n_Bi, (gamma*mf.normB)^2*(mf.normB<1.9e-9[T])*(mf.normB>1.8e-9[T])*l_ind*n_Bi, (gamma*mf.normB)^2*(mf.normB<1.8e-9[T])*(mf.normB>1.7e-9[T])*l_ind*n_Bi, (gamma*mf.normB)^2*(mf.normB<1.7e-9[T])*(mf.normB>1.6e-9[T])*l_ind*n_Bi, (gamma*mf.normB)^2*(mf.normB<1.6e-9[T])*(mf.normB>1.5e-9[T])*l_ind*n_Bi, (gamma*mf.normB)^2*(mf.normB<1.5e-9[T])*(mf.normB>1.4e-9[T])*l_ind*n_Bi, (gamma*mf.normB)^2*(mf.normB<1.4e-9[T])*(mf.normB>1.3e-9[T])*l_ind*n_Bi, (gamma*mf.normB)^2*(mf.normB<1.3e-9[T])*(mf.normB>1.2e-9[T])*l_ind*n_Bi, (gamma*mf.normB)^2*(mf.normB<1.2e-9[T])*(mf.normB>1.1e-9[T])*l_ind*n_Bi, (gamma*mf.normB)^2*(mf.normB<1.1e-9[T])*(mf.normB>1.0e-9[T])*l_ind*n_Bi, (gamma*mf.normB)^2*(mf.normB<1.0e-9[T])*(mf.normB>0.9e-9[T])*l_ind*n_Bi, (gamma*mf.normB)^2*(mf.normB<0.9e-9[T])*(mf.normB>0.8e-9[T])*l_ind*n_Bi, (gamma*mf.normB)^2*(mf.normB<0.8e-9[T])*(mf.normB>0.7e-9[T])*l_ind*n_Bi, (gamma*mf.normB)^2*(mf.normB<0.7e-9[T])*(mf.normB>0.6e-9[T])*l_ind*n_Bi, (gamma*mf.normB)^2*(mf.normB<0.6e-9[T])*(mf.normB>0.5e-9[T])*l_ind*n_Bi, (gamma*mf.normB)^2*(mf.normB<0.5e-9[T])*(mf.normB>0.4e-9[T])*l_ind*n_Bi, (gamma*mf.normB)^2*(mf.normB<0.4e-9[T])*(mf.normB>0.3e-9[T])*l_ind*n_Bi, (gamma*mf.normB)^2*(mf.normB<0.3e-9[T])*(mf.normB>0.2e-9[T])*l_ind*n_Bi, (gamma*mf.normB)^2*(mf.normB<0.2e-9[T])*(mf.normB>0.1e-9[T])*l_ind*n_Bi, (gamma*mf.normB)^2*(mf.normB<0.1e-9[T])*(mf.normB>0.0e-9[T])*l_ind*n_Bi)
    1.9-2.0 (kg^4/(s^6*A^4)) | 1.8-1.9 (kg^4/(s^6*A^4)) | 1.7-1.8 (kg^4/(s^6*A^4)) | 1.6-1.7 (kg^4/(s^6*A^4)) | 1.5-1.6 (kg^4/(s^6*A^4)) | 1.4-1.5 (kg^4/(s^6*A^4)) | 1.3-1.4 (kg^4/(s^6*A^4)) | 1.2-1.3 (kg^4/(s^6*A^4)) | 1.1-1.2 (kg^4/(s^6*A^4)) | 1.0-1.1 (kg^4/(s^6*A^4)) | 0.9-1.0 (kg^4/(s^6*A^4)) | 0.8-0.9 (kg^4/(s^6*A^4))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
    850.443 | 0 | 324.913 | 332.333 | 0 | 918.609 | 833.595 | 1371.37 | 343.919 | 942.142 | 642.968 | 3389.23
  tbl2: Table "N"
    // N ((mf.normB<2.0e-9[T])*(mf.normB>1.9e-9[T])*l_ind*n_Bi, (mf.normB<1.9e-9[T])*(mf.normB>1.8e-9[T])*l_ind*n_Bi, (mf.normB<1.8e-9[T])*(mf.normB>1.7e-9[T])*l_ind*n_Bi, (mf.normB<1.7e-9[T])*(mf.normB>1.6e-9[T])*l_ind*n_Bi, (mf.normB<1.6e-9[T])*(mf.normB>1.5e-9[T])*l_ind*n_Bi, (mf.normB<1.5e-9[T])*(mf.normB>1.4e-9[T])*l_ind*n_Bi, (mf.normB<1.4e-9[T])*(mf.normB>1.3e-9[T])*l_ind*n_Bi, (mf.normB<1.3e-9[T])*(mf.normB>1.2e-9[T])*l_ind*n_Bi, (mf.normB<1.2e-9[T])*(mf.normB>1.1e-9[T])*l_ind*n_Bi, (mf.normB<1.1e-9[T])*(mf.normB>1.0e-9[T])*l_ind*n_Bi, (mf.normB<1.0e-9[T])*(mf.normB>0.9e-9[T])*l_ind*n_Bi, (mf.normB<0.9e-9[T])*(mf.normB>0.8e-9[T])*l_ind*n_Bi, (mf.normB<0.8e-9[T])*(mf.normB>0.7e-9[T])*l_ind*n_Bi, (mf.normB<0.7e-9[T])*(mf.normB>0.6e-9[T])*l_ind*n_Bi, (mf.normB<0.6e-9[T])*(mf.normB>0.5e-9[T])*l_ind*n_Bi, (mf.normB<0.5e-9[T])*(mf.normB>0.4e-9[T])*l_ind*n_Bi, (mf.normB<0.4e-9[T])*(mf.normB>0.3e-9[T])*l_ind*n_Bi, (mf.normB<0.3e-9[T])*(mf.normB>0.2e-9[T])*l_ind*n_Bi, (mf.normB<0.2e-9[T])*(mf.normB>0.1e-9[T])*l_ind*n_Bi, (mf.normB<0.1e-9[T])*(mf.normB>0.0e-9[T])*l_ind*n_Bi)
    1.9-2.0 (1) | 1.8-1.9 (1) | 1.7-1.8 (1) | 1.6-1.7 (1) | 1.5-1.6 (1) | 1.4-1.5 (1) | 1.3-1.4 (1) | 1.2-1.3 (1) | 1.1-1.2 (1) | 1.0-1.1 (1) | 0.9-1.0 (1) | 0.8-0.9 (1)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
    118805 | 0 | 57852.8 | 63178.8 | 0 | 241367 | 241367 | 482729 | 128356 | 484754 | 392304 | 2.54526e+06
  tbl3: Table "g_ens2_number"
    // g_ens^2_number ((gamma*mf.normB)^2*l_ind*n_Bi)
    (gamma*mf.normB)^2*l_ind*n_Bi (kg^4/(s^6*A^4))
    225730

Plots
  pg1: PlotGroup2D "Magnetic Flux Density Norm (mf)" | data = dset1
    surf1: Surface | expr = mf.normB
    con1: Contour | expr = mf.Az
  pg2: PlotGroup1D "1D Plot Group 2" | data = dset1
  pg3: PlotGroup1D "1D Plot Group 3" | data = none

Exports
  tbl1: Table "g_ens2" | table = tbl1; filename = /home/ucapmhy/COMSOL_files/exports/g_ens2.csv
  tbl2: Table "N" | table = tbl2; filename = /home/ucapmhy/COMSOL_files/exports/N.csv
  tbl3: Table "g_ens2_number" | table = tbl3; filename = /home/ucapmhy/COMSOL_files/exports/g_ens2_number.csv